origin := 0
i := 0 .. 99
y(x) := sin(x) + exp(x/2)
shag := 2*π/99
a := -π, -π + shag .. π
y1(x) := y(x) series, 11 → 1 + 3*x/2 + x^2/8 - 7*x^3/48 + x^4/384 + 11*x^5/1280 + x^6/46080 - 127*x^7/645120 + x^8/10321920 + 19*x^9/6881280 + x^10/3715891200
rez_y(x) := y(x) - y1(x)
a = [
    -3.14159; -3.07813; -3.01466; -2.95119; -2.88773; -2.82426; -2.76079; -2.69733; -2.63386; -2.57039
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]
y(a) = [
    0.20788; 0.151158; 0.0949082; 0.039391; -0.0151338; -0.0684096; -0.120184; -0.170208; -0.21824; -0.264045
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]
y1(a) = [
    0.200957; 0.145614; 0.0904892; 0.035886; -0.0178997; -0.0705807; -0.121878; -0.171523; -0.219254; -0.264822
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]
rez_y(a) = [
    0.00692209; 0.00554377; 0.00441898; 0.00350509; 0.00276597; 0.00217103; 0.00169453; 0.00131489; 0.00101405; 0.000777028
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]
shag = 0.0634665
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PRNCOLWIGTH := 30
PRNPRECISION := 9
i := 0 .. 99
M[i, 0] := i
M[i, 1] := -π + i*shag
M[i, 2] := y(M[i, 1])
M[i, 3] := y1(M[i, 1])
M[i, 4] := rez_y(M[i, 1])
max_er := max(M[:, 4]) = 0.00692209
rez := WRITEEXCEL(M, "C:\Users\мария\PycharmProjects\cyrsMatcad_1\MathCadExcel.xlsx")
M = [
    0, -3.14159, 0.20788, 0.200957, 0.00692209;
    1, -3.07813, 0.151158, 0.145614, 0.00554377;
    2, -3.01466, 0.0949082, 0.0904892, 0.00441898;
    3, -2.95119, 0.039391, 0.035886, 0.00350509;
    4, -2.88773, -0.0151338, -0.0178997, 0.00276597;
    5, -2.82426, -0.0684096, -0.0705807, 0.00217103;
    6, -2.76079, -0.120184, -0.121878, 0.00169453;
    7, -2.69733, -0.170208, -0.171523, 0.00131489;
    8, -2.63386, -0.21824, -0.219254, 0.00101405;
    9, -2.57039, -0.264045, -0.264822, 0.000777028
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]
